# Основные геометрические параметры
# Основные геометрические параметры
# Цилиндрический сегмент РН
L_cil := 12.1 m
D_cil := 1.2 m
R_cil := D_cil/2 = 0.6 m
# Расчёт  ЦТ
# Цилиндрический сегмент
# Площать поверхности
S_cil := 2*π*R_cil*L_cil = 45.6159 m^2
# Объем
V_cil := π*L_cil*R_cil^2 = 13.6848 m^3
# Центр тяжести поверхности
Xs_сil := L_cil/2 = 6.05 m
# Центр тяжести объёма
Xv_cil := L_cil/2 = 6.05 m
# Площадь дна
Sdn := π*D_cil^2/4 = 1.13097 m^2
# Суммарная площадь
Ss := S_cil + Sdn = 46.7469 m^2
# Суммарный объем
Vs := V_cil = 13.6848 m^3
# Центр тяжести поверхности
Xs := (L_cil*S_cil)/Ss = 11.8073 m
# Центр тяжести объема
Xv := (L_cil*V_cil)/Vs = 12.1 m
# Коэффициент заполенния
Kzap := 4.836*Vs^(2/3)/Ss = 0.591869
L := 1.2 m
# Расчет аэродинамических коэффициентов
# Рассмотрим аэродинамические характеристики на углах атаки от 0 до 180 град
# Коэффициент уточнённной формулы Ньютона примем
k := 2
α := 0, 0.01 .. 180 deg
# Конический сегмент
ξ := dk1/Dk1
# коэффициент пропорциональности
ξ =  # error: Эта переменная не определена.
Sk1 := π*Dk1^2/4
# - площадь большего сечения конуса
θk1 := 5 deg
# Коэффициент продольной силы:
Cxk11(α) := k*Lk1*Dk1/2*(1 + ξ)/Sk1*π*tan(θk1)/2*(2*cos(α)^2*sin(θk1)^2 + sin(α)^2*cos(θk1)^2)
k12 := k*Lk1*Dk1/2*(1 + ξ)/Sk1*tan(θk1)/2
Cxk12(α) := k12*((2*cos(α)^2*sin(θk1)^2 + sin(α)^2*cos(θk1)^2)*(π/2 + asin(tan(θk1)/tan(α))) + 3*cos(α)*sin(θk1)*sqrt(sin(α)^2 - sin(θk1)^2))
# Приведем коэффициенты к масштабу донной плоскости:
D := 1 m
Cxk11p(α) := Cxk11(α)*(Dk1/D)^2
Cxk12p(α) := Cxk12(α)*(Dk1/D)^2
# Значение коэффициента продольной силы для различных углов атаки:
Cxk1(α) :=
    Cxk11p(α) if 0 ≤ α ≤ θk1
    Cxk12p(α) if θsf < α ≤ π - θk1
    0 if α ≥ π - θk1
# Коэффициент нормальной силы:
Cyk11(α) := k*Lk1*Dk1/2*(1 + ξ)/Sk1*π*cos(α)*sin(α)*sin(θk1)*cos(θk1)
Cyk12(α) := k*Lk1*Dk1/2*(1 + ξ)/Sk1*(cos(α)*sin(α)*sin(θk1)*cos(θk1)*(π/2 + asin(tan(θk1)/tan(α))) + (2*sin(α)^2*cos(θk1)^2 + sin(θk1)^2*cos(α)^2)/(3*sin(α)*cos(θk1))*sqrt(sin(α)^2 - sin(θk1)^2))
# Приведем коэффициенты к масштабу донной плоскости:
Cyk11p(α) := Cyk11(α)*(Dk1/D)^2
Cyk12p(α) := Cyk12(α)*(Dk1/D)^2
# Значение коэффициента нормальной силы для различных углов атаки:
# Донная плоскость
# Коэффициент продольной силы:
Cyk1(α) :=
    Cyk11p(α) if 0 ≤ α ≤ θk1
    Cyk12p(α) if θk1 ≤ α ≤ π - θk1
    0 if α ≥ π - θk1
Cxd(α) :=
    0 if 0 ≤ α ≤ π/2
    k*cos(α)^2 if π/2 ≤ α ≤ π
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# Нормальная составляющая сопротивления плоскости обращается в нуль, т.е.
Cyd(α) := 0
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α := 0, 10 deg .. 180 deg
Cxk1(α) =  # error
Cyk1(α) =  # error  # Определение аэродинамических характеристик СА в связанной СК
# Коэффициент продольной силы:
CX(α) := Cx(α) + Cxk1(α) + Cxd(α)
# Коэффициент нормальной силы:
CY(α) := Cy(α) + Cyk1(α) + Cyd(α)
# Общий коэффициент аэродинамической силы:
CR(α) := sqrt(CX(α)^2 + CY(α)^2)
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# Определение аэродинамических характеристик СА в скоростной СК
# Коэффициент лобового сопротивления:
C_Xa(α) := CX(α)*cos(α) + CY(α)*sin(α)
# Коэффициент подъемной силы:
C_Ya(α) := -CX(α)*sin(α) + CY(α)*cos(α)
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α := 0, 10 deg .. 180 deg
CX(α) =  # error
CY(α) =  # error
CR(α) =  # error
C_Xa(α) =  # error
C_Ya(α) =  # error
# Определение аэродинамического качества СА
# Аэродинамическое качетсво выражается отношением подъемной силы к силе лобового сопротивления или через отношение соответствующих аэродинамических коэффициентов:
K_ad(α) := C_Ya(α)/C_Xa(α)
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α_bal := 16 deg
Given
K_ad(α_bal) == 0.1
α_bal := Find(α_bal/deg)
α_bal =  # error
# Определение положения центра давления СА
# Координаты центров давления для отсеков СА (отсчет от носка)
# Сферический сегмент | Усеченный конус
# Координата центра давления
ξ := dk1/Dk1
X_CPsp := Rsf
# Коэффициент центра давления:
α := 0, 0.001 .. π
CP_c1 := dsf/(2*Lsf*tan(θsf))*(1 - 2/(3*cos(θsf)^2)*(1 - ξ^3)/(1 - ξ^2))
# Координата центра давления конуса
X_CPc1 := Lk1 + Lsf*CP_c1
# Центр давления для всего СА:
X_CP(α) := (Cy(α)*X_CPsp + Cyk1(α)*X_CPc1)/CY(α)
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# Коэффициент центра давления:
C_CP(α) := X_CP(α)/L
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# Определение центра масс СА
# Для динамической устойчивости необходимо, чтобы центр давления располагался за центром масс на расстоянии не менее чем 1-2% от длины аппарата.
# Определим координату ЦД при балансировочном угле атаки:
α_bal =  # error
X_CP(α_bal*deg) =  # error
# В то же время ЦТ объма СА:
Xv = 12.1 m
# Для улучшения компоновки удалим ЦД от носка СА, вводя дополнительное оперение в хвостовой части.
a := 0.3 m  # - длина крыла
h := 0.45 m  # - высота крыла
S := π*D^2/4  # - площадь миделя
b := 0.1 m  # - длина прямоугольной части крыла
c := a - b = 0.2 m  # - длина треугольной части крыла
S_w := b*h + 0.5*h*c = 0.09 m^2  # - площадь крыла
# Коэффициент нормальной силы крыла:
C_Yw(α) := k*sin(α)^2*S_w/S
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# Коэффициент продольной силы крыла:
C_Xw(α) := 0
# Коэффициент центра давления: | Координата центра давления:
CP_w := (2*c^2 + 6*c*b + 3*b^2)/(3*Lk1*(c + 2*b))
X_CPw := L - Lk1*CP_w
# Пересчитаем АД характеристики с учетом добавления двух крыльев.
# Коэффициент нормальной силы в связанной СК: | Коэффициент нормальной силы в скоростной СК:
C_Y(α) := Cy(α) + Cyk1(α) + Cyd(α) + 2*C_Yw(α)
C_Ya(α) := -CX(α)*sin(α) + C_Y(α)*cos(α)
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# Аэродинамическое качество:
K_ad(α) := C_Ya(α)/C_Xa(α)
# Определим центр давления для всего СА: | Коэффициент центра давления:
X_CP(α) := (Cy(α)*X_CPsp + Cyk1(α)*X_CPc1 + 2*C_Yw(α)*X_CPw)/C_Y(α)
C_CP(α) := X_CP(α)/L
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X_CP(7.794 deg) =  # error
# Определяем новое значение балансировочного угла:
α_bal := 12 deg
Given
K_ad(α_bal) == 0.1
α_bal := Find(α_bal/deg)
α_m := 0
α_min := Minimize(X_CP, α_m)
# Угол между продольной осью аппарата и результирующей силой аэродинамического сопротивления при балансировочном угле атаки:
# Координата ЦМ СА по продольной оси:
X_CM := X_CP(α_min*deg) - L/100
# Координата Y ЦМ СА:
ψ := atan(C_Y(α_bal*deg)/CX(α_bal*deg))/deg
Y_CM := (-X_CM + X_CP(α_bal*deg))*C_Y(α_bal*deg)/CX(α_bal*deg)
α := 1 deg, 10 deg .. 180 deg
CX(α) =  # error
C_Y(α) =  # error
C_Xa(α) =  # error
C_Ya(α) =  # error
X_CP(α) =  # error
C_CP(α) =  # error
K_ad(α) =  # error
CX(α_bal*deg) =  # error
C_Xa(α_bal*deg) =  # error
C_CP(α_bal*deg) =  # error
K_ad(α_bal*deg) =  # error
C_Y(α_bal*deg) =  # error
C_Ya(α_bal*deg) =  # error
X_CP(α_bal*deg) =  # error
# Баллистический расчет
# Запишем систему уравнений движения тела сосредоточенной массы, т.е. без учёта моментов инерции. Примем, что движение происходит в однородном плоскопараллельном поле сил тяготения и в стандартной атмосфере. Тогда:
d/dt(V) == -g(h)*sinθ - ρ(h)*V^2/(2*P_x)
d/dt(θ) == (V^2 - g(h)*(R_z + h))/(V*(R_z + h))*cosθ + ρ(h)*V*K_гип/(2*P_x)
d/dt(L) == V*cosθ*R_z/(R_z + h)
d/dt(h) == V*sinθ
# Теоретическая масса СА:
m_sa := 510
# Решение этой системы производится методом Рунге-Кутты при начальных условиях:
V_0 == 7800*m/s
h_0 == 100 km
θ_0 == -2 deg
R_z := 6371*10^3
# Участок неуправляемого спуска: подъемные силы отсутсвуют
α := 0
K_ad(α) =  # error
C_Xa(α) =  # error  # коэффициент лобового сопротивления СА
ρ_0 := 1.225
β := 1.395*10^-4
ρ(h) := ρ_0*e^(-β*h)  # зависимость плотности атмосферы от высоты
g_0 := 9.81  # ускорение свободного падения на уровне Земли
g(h) := g_0*R_z^2/(R_z + h)^2  # изменение ускорения свободного падения от высоты
D := 1  # характерный размер СА
S := π*D^2/4 = 0.785398  # площадь миделя СА
P_x := m_sa/(C_Xa(α)*S)  # нагрузка на несущую поверхность
K_ad(α) =  # error
y := [7800; -2 deg; 0; 100000]  # начальные условия для решения системы ДУ движения СА методом Рунге-Кутты 4 порядка
D1(t, y) := [
    -g(y[3])*sin(y[1]) - ρ(y[3])*y[0]^2/(2*P_x);
    (y[0]^2 - g(y[3])*(R_z + y[3]))/(y[0]*(R_z + y[3]))*cos(y[1]) + ρ(y[3])*y[0]*K_ad(α)/(2*P_x);
    y[0]*cos(y[1])*R_z/(R_z + y[3]);
    y[0]*sin(y[1])
]  # система дифференциальных уравнений движения
H := rkfixed(y, 0, 2200, 2200, D1)
H =  # error
t_max :=
    i ← 0
    while H[i, 4] > 10000
        i ← i + 1  # с  # определение максимального времени спуска СА
t := 0, 1 .. t_max
V(t) := H[t, 1]
θ(t) := H[t, 2]/deg
L(t) := H[t, 3]
H(t) := H[t, 4]
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# Зависимость перегрузки от времени полета определяется формулой:
n(t) := sqrt(1 + K_ad(α)^2)/(2*P_x*g(H(t)))*ρ(t)*V(t)^2
ρ(t) := ρ(H(t))
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# Участок управляемого спуска
β := 1.395*10^-4
ρ_0 := 1.225
ρ(h) := ρ_0*e^(-β*h)  # зависимость плотности атмосферы от высоты
g_0 := 9.81
# ускорение свободного падения на уровне Земли
g(h) := g_0*R_z^2/(R_z + h)^2  # изменение ускорения свободного падения от высоты
D := 1
# характерный размер СА
S := π*D^2/4 = 0.785398  # площадь миделя СА
K_ad(α_bal*deg) =  # error
C_Xa(α_bal*deg) =  # error
P_x := m_sa/(C_Xa(α_bal*deg)*S)
y := [7800; -2 deg; 0; 100000]  # начальные условия для решения системы ДУ движения СА методом Рунге-Кутты 4 порядка
D1(t, y) := [
    -g(y[3])*sin(y[1]) - ρ(y[3])*y[0]^2/(2*P_x);
    (y[0]^2 - g(y[3])*(R_z + y[3]))/(y[0]*(R_z + y[3]))*cos(y[1]) + ρ(y[3])*y[0]*K_ad(α_bal*deg)/(2*P_x);
    y[0]*cos(y[1])*R_z/(R_z + y[3]);
    y[0]*sin(y[1])
]
H := rkfixed(y, 0, 2200, 2200, D1)
H =  # error
t_max :=
    i ← 0
    while H[i, 4] > 10000
        i ← i + 1  # с
t := 0, 1 .. t_max
V(t) := H[t, 1]
θ(t) := H[t, 2]/deg
L(t) := H[t, 3]
H(t) := H[t, 4]
# Зависимость перегрузки от времени полета определяется формулой:
ρ(t) := ρ(H(t))
n(t) := sqrt(1 + K_ad(α_bal*deg)^2)/(2*P_x*g(H(t)))*ρ(t)*V(t)^2
ρ(200) =  # error
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H(200) =  # error
101325*exp(-47020/7.99) = 0
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V(200) =  # error
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# Расчет тепловых режимов
# Расчет тепловых режимов будем проводить для управляемой траектории.
# Зависимость температуры окружающего воздуха от высоты
# Определим изменение температуры атмосферы от высоты по ГОСТ 4401-81
H_1 := transpose([0, 1000, 3000, 5000, 10000, 15000, 20000, 30000, 50000, 100000])  # м
T_1 := transpose([288.15, 281.65, 268.66, 255.68, 223.25, 216.65, 216.65, 226.51, 270.65, 196.60])  # К
# Зависимость температуры атмосферы от времени спуска.
S_1 := pspline(H_1, T_1)
T_atm(h) := interp(S_1, H_1, T_1, h)
T(t) := T_atm(H(t))
Rsf := 0.431
# В домашней работе используется инженерный метод определения тепловых режимов, и, поэтому, можно использовать приближенные зависимости, полученные из точных решений.
# Для проведения инженерных расчетов температурного режима аппарата в качестве условной границы перехода от ламинарного к турбулентному режиму можно принять критическое число Рейнольдса.
# Число Рейнольдся определяется соотношением:
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T(200) =  # error
Re == V*Rsf/ν == ρ*V*Rsf/μ
# где V - скорость потока, м/с;
# R - характерный размер, м. Примем радиус сферического сегмента СА
# ν - коэффициент кинематической вязкости среды, м^2/c;
# ρ - плотность атмосферы, кг/м^3;
# μ - коэффициент динамической вязкости среды, кг/(м*с).
# Определим ν по ГОСТ 4401-81.
# В ГОСТ 4401-81 представлены значения кинематической вязкости воздуха до высоты в 80 км. Недостающие значения были получены из формулы Сазерленда для динамической вязкости и соотношения для динамической и кинематической вязкостей.
# Получим зависимость кинематической вязкости от времени полета СА, используя встроенный функционал пакета Mathcad.
H_2 := [0; 5000; 10000; 15000; 20000; 25000; 30000; 35000; 40000; 45000; 50000; 55000; 60000; 65000; 70000; 75000; 80000; 85000; 90000; 95000; 100000]
ν_atm := [
    1.4607*10^-5;
    2.211*10^-5;
    3.5251*10^-5;
    7.2995*10^-5;
    1.5989*10^-4;
    3.6135*10^-4;
    8.0134*10^-4;
    1.8063*10^-3;
    4.0067*10^-3;
    8.4996*10^-3;
    1.6591*10^-2;
    2.9117*10^-2;
    5.1141*10^-2;
    9.2618*10^-2;
    1.7358*10^-1;
    3.4465*10^-1;
    7.1558*10^-1;
    1.616;
    3.6786;
    8.9474;
    22.6524
]
S_2 := pspline(H_2, ν_atm)
ν_int(h) := interp(S_2, H_2, ν_atm, h)
ν(t) := ν_int(H(t))
# Тогда число Рейнольдса в зависимости от времени полета СА примет вид:
Re(t) := V(t)*Rsf/ν(t)
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# Тепловой поток, поступающий к поверхности аппарата, входящего в атмосферу, складывается из лучистого тепла, поступающего от ударной волны, и конвективного тепла, выделяющегося в пограничном слое при торможении газового потока. При определенной величине теплового потока может начаться плавление и абляция поверхностных слоев теплозащитного покрытия. Соответственно некоторая величина теплового потока идет на нагревание пакета теплозащитных материалов, а другая часть излучается поверхностью аппарата в окружающее пространство. В расчетах иногда учитывают тепло, подходящее к поверхности аппарата от атмосферы и т.д., однако доля этого тепла обычно мала по сравнению с конвективным теплом от пограничного слоя и лучистого тепла от ударной волны, поэтому им в проетных расчетах на первом этапе разработки обычно пренебрегают.
# в условиях ламинарного режима обтекания величина конвективного теплового потока на сферическом сегменте может быть определена по формуле, предложенной Кемпом и Ридделом:
q_l == 31500/sqrt(Rsf)*sqrt(ρ_H/ρ_0)*(V_H/V_1k)^3.25*(1 - I_w/I_0)  # ккал/(м^2*c)
ρ_H(t) := ρ_0*exp(-0.02896*9.807*H(t)/(8.3143*288.15))
# Здесь:
# Rsf - радиус сферического сегмента, м;
# ρ_H и ρ_0 - плотности атмосферы соответственно в расчетный момент на высотеH и на поверхности Земли (на уровне моря). ρ_0 = 1.225кг/м^3;
# V_H - скорость полета в расчетный период времени, м/с;
# V_1k - первая космическая скорость, V_1k := 7800 м/с;
# I_w и I_0 - энтальпия воздуха при температуре стенки в расчетной точке и энтальпия торможения.
# Энтальпийным фактором I_w/I_0 пренебрегают в проектных оценочных расчетах вследствие малости этого отношения.
# Перепишем тогда уравнение для конвективного теплового потока в ламинарном режиме обтекания:
q_l(t) := 31500/sqrt(Rsf)*sqrt(ρ_H(t)/ρ_0)*(V(t)/V_1k)^3.25  # ккал/(м^2*c)
# Если воздушный поток, обтекающий поверхность СА, является турблентным, то процесс нагрева поверхности в большинстве случаев интенсифицируется, и расчет величины тепловых потоков следует проводить по формулам турбулентного обтекания.
# для расчета турбулентного режима нагрева часто используют формулу Сибулкина (также пренебрегаем энтальпийным фактором):
q_t(t) := 2.75*10^5*ρ_H(t)^0.8/Rsf^0.2*(V(t)/V_1k)^3.19  # ккал/(м^2*c)
# Радиационный (лучистый) нагрев Андреевский предлагает рассчитывать по следующей зависимости:
q_r == A_r*Rsf*ρ_H^L*(V_H/1000)^K  # ккал/(м^2*c)
# Значения A_r , L , K устанавливаются для скоростей  V_H < 8500 м/с таким образом:
A_r := 1.038*10^-4
L := 1.68
K := 7.4
q_r(t) := A_r*Rsf*ρ_H(t)^L*(V(t)/1000)^K
# Определение режима обтекания - ламинарного или турбулентного - определяется критическим числом Рейнольдса:
# где a - скорость звука, м/с.
a(t) := 20.46*sqrt(T(t))  # м/с
Re_kr(t) := 300*e^(0.2*V(t)/a(t))
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# Тогда суммарный тепловой поток:
q_w(t) :=
    (q_l(t) + q_r(t)) if Re(t) < Re_kr(t)
    (q_t(t) + q_r(t)) if Re(t) > Re_kr(t)
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# Температура поверхности в градусах Кельвина определяется по формуле:
# σ - постоянная Стефана-Больцмана σ := 13.5*10^-12 ккал/(м^2*с*К^4);
# ε - степень черноты поверхности аппарата, ε := 0.8.
T_w(t) := (q_w(t)/(σ*ε))^0.25
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t := 0, 20 .. 300
t = [0; 20; 40; 60; 80; 100; 120; 140; 160; 180; 200; 220; 240; 260; 280; 300]
q_w(t) =  # error
T_w(t) =  # error
# Расчет моментов инерции
# Распределение массы по поверхности
G_SA := 510 kg
Ss = 46.7469 m^2
η := G_SA/Ss = 10.9098 kg/m^2
G_SS := Ssf*η
G_SK1 := Sk1p*η
G_SDN := Sdn*η = 12.3387 kg
# Распределение массы по объему
G_SA := 510 kg
Vs = 13.6848 m^3
τ := G_SA/Vs = 37.2677 kg/m^3
G_VS := Vsf*τ
G_VK1 := Vk1*τ
# Сферический сегмент
Rsf := 0.431 m
Lsf := 0.393 m
# Координата центра масс:
x_0_Сфера := 1*Lsf*(8*Rsf - 3*Lsf)/(5*(3*Rsf - Lsf)) = 0.198159 m
# Расчет по площадям:
# Моменты инерции сферического сегмента относительно плоскостей:
I_YOZ_Сфера_S := 1*G_SS*Lsf^2/12
I_ZOX_Сфера_S := 1*G_SS*Lsf*(3*Rsf - Lsf)/6
I_XOY_Сфера_S := I_ZOX_Сфера_S
# Моменты инерции сферического сегмента относительно главных центральных осей:
I_XX_Сфера_S := I_ZOX_Сфера_S + I_XOY_Сфера_S
I_YY_Сфера_S := I_YOZ_Сфера_S + I_XOY_Сфера_S
I_ZZ_Сфера_S := I_YOZ_Сфера_S + I_XOY_Сфера_S
# Расчет по объему:
# Моменты инерции сферического сегмента относительно плоскостей:
I_YOZ_Сфера_V := G_VS*Lsf^2*(8*Rsf*(5*Rsf - 3*Lsf) + 3*Rsf^2)/(80*(3*Rsf - Lsf)^2)
I_ZOX_Сфера_V := G_VS*Lsf*(5*Rsf*(5*Rsf - 3*Lsf) + 3*Lsf^2)/(20*(3*Rsf - Lsf))
I_XOY_Сфера_V := I_ZOX_Сфера_V
# Моменты инерции сферического сегмента относительно главных центральных осей:
I_XX_Сфера_V := I_ZOX_Сфера_V + I_XOY_Сфера_V
I_YY_Сфера_V := I_YOZ_Сфера_V + I_XOY_Сфера_V
I_ZZ_Сфера_V := I_YOZ_Сфера_V + I_XOY_Сфера_V
# Усеченный конус
Rk := 0.5 m
rk := dk1/2
Lk := Lk1
# Координата центра масс:
x_0_Конус := Lk - Lk*(2 + (Rk - rk)*(Rk^2 - rk^2)/(Rk^3 - rk^3))/4
# Расчет по площадям:
# Моменты инерции конического сегмента относительно плоскостей:
I_YOZ_Конус_S := 1*G_SK1*Lk^2*((Rk + rk)^2 + 2*Rk*rk)/(18*(Rk - rk)^2)
I_ZOX_Конус_S := 1*G_SK1*(Rk^2 + rk^2)/4
I_XOY_Конус_S := I_ZOX_Конус_S
# Моменты инерции конического сегмента относительно главных центральных осей:
I_XX_Конус_S := I_ZOX_Конус_S + I_XOY_Конус_S
I_YY_Конус_S := I_YOZ_Конус_S + I_XOY_Конус_S
I_ZZ_Конус_S := I_YOZ_Конус_S + I_XOY_Конус_S
# Расчет по объему:
# Моменты инерции конического сегмента относительно плоскостей:
I_YOZ_Конус_V := G_VK1*π*Lk^2*(Rk - rk)^2*((Rk + rk)^4 + 4*Rk^2*rk^2)/(3*(Rk^3 - rk^3)^2)
I_ZOX_Конус_V := 3*G_VK1*(Rk^5 - rk^5)/(20*(Rk^3 - rk^3))
I_XOY_Конус_V := I_ZOX_Конус_V
# Моменты инерции конического сегмента относительно главных центральных осей:
I_XX_Конус_V := I_ZOX_Конус_V + I_XOY_Конус_V
I_YY_Конус_V := I_YOZ_Конус_V + I_XOY_Конус_V
I_ZZ_Конус_V := I_YOZ_Конус_V + I_XOY_Конус_V
# Донная плоскость:
# Расчет моментов инерции донной плоскоти по площади
I_YOZ_Дно_S := G_SDN*(6*rk^2)/12
I_ZOX_Дно_S := G_SDN*rk^2
I_XOY_Дно_S := I_ZOX_Дно_S
# Моменты инерции донной плоскости относительно главных центральных осей
I_XX_Дно_S := I_ZOX_Дно_S + I_XOY_Дно_S
I_YY_Дно_S := I_YOZ_Дно_S + I_XOY_Дно_S
I_ZZ_Дно_S := I_YOZ_Дно_S + I_XOY_Дно_S
# Расчет моментов инерции относительно главных центральных осей СА
# Центр тяжести поверхности аппарата:
Xs := 0.725 m
# Центр тяжести объема:
Xv := 0.696 m
# Моменты инерции СА по поверхности:
I_XX_CA_S := I_XX_Сфера_S + I_XX_Конус_S + I_XX_Дно_S
I_YY_CA_S := I_YY_Сфера_S + I_YY_Конус_S + I_YY_Дно_S + G_SS*(Xs - x_0_Сфера)^2 + G_SK1*(Xs - Lsf - x_0_Конус)^2 + G_SDN*(Xs - Lsf - Lk1)^2
I_ZZ_CA_S := I_YY_CA_S
# Моменты инерции СА по объему:
I_XX_CA_V := I_XX_Сфера_V + I_XX_Конус_V
I_YY_CA_V := I_YY_Сфера_V + I_YY_Конус_V + G_VS*(Xv - x_0_Сфера)^2 + G_VK1*(Xv - Lsf - x_0_Конус)^2
I_ZZ_CA_V := I_YY_CA_V
# Инерциальный расчет СА
I_XX := (I_XX_CA_S + I_XX_CA_V)/2
I_YY := (I_YY_CA_S + I_YY_CA_V)/2
I_ZZ := I_YY
# Моменты инерции СА по поверхности:
I_XX_CA_S := I_XX_Сфера_S + I_XX_Конус_S + I_XX_Дно_S
I_YY_CA_S := I_YY_Сфера_S + I_YY_Конус_S + I_YY_Дно_S + G_SS*(Xs - x_0_Сфера)^2 + G_SK1*(Xs - Lsf - x_0_Конус)^2 + G_SDN*(Xs - Lsf - Lk1)^2
I_ZZ_CA_S := I_YY_CA_S
# Моменты инерции СА по объему:
I_XX_CA_V := I_XX_Сфера_V + I_XX_Конус_V
I_YY_CA_V := I_YY_Сфера_V + I_YY_Конус_V + G_VS*(Xv - x_0_Сфера)^2 + G_VK1*(Xv - Lsf - x_0_Конус)^2
I_ZZ_CA_V := I_YY_CA_V
# Инерциальный расчет СА
I_XX := (I_XX_CA_S + I_XX_CA_V)/2
I_YY := (I_YY_CA_S + I_YY_CA_V)/2
I_ZZ := I_YY
